// COMSOL Multiphysics 6.2.0.339 model "sca2d.mph"
// Outline of the model tree

Parameters
  q = 1
  lambda = 2*pi*1[m]/q
  nrefr0 = 2.5
  d = 1.1
  c = 0.02
  w0 = pi [m] / q

Variables
  var1 "Variables 1" on domains 1-5
    nrefr = 1
  var4 "Variables 4" on selection geom1_sel1
    nrefr = nrefr0
  var5 "Variables 5"
    radius = sqrt(root.x^2 + root.y^2) / 1[m]
    phi = atan2(root.y, root.x)  // Azimuth angle

Coordinate systems
  pml1: PML "Perfectly Matched Layer 1" on domains 1-4 | ScalingType = Cylindrical

Geometry
  geom1 "Geometry 1" (2D, length unit m)
    c2: Circle | layername = Layer 1; layer = 2; r = 14
    c3: Circle | pos = {0, 3}
    sel1: ExplicitSelection | selection = c3(1) domains 1
    fin: Finalize "Form Union"

Materials
  mat1: Common "Material 1" on all domains
    RefractiveIndex
      n = 1
      ki = 0

Physics
  ewfd: ElectromagneticWavesFrequencyDomain on all domains
    dependent variable E = {Ex, Ey, Ez}
    components.components = outofplane
    BackgroundField.SolveFor = scatteredField
    BackgroundField.WaveType = GaussianBeam
    BackgroundField.Eb = {0, 0, exp(-1j*2*pi/lambda*(x))*1 +0 * (real_inc_field(x/1[m], y/1[m]) + 1j * imag_inc_field(x/1[m], y/1[m]))}
    BackgroundField.w0 = w0
    wee1: WaveEquationElectric (default)
      DisplacementFieldModel = RelativePermittivity
      n_mat = userdef
      n = nrefr
      epsilonr_mat = userdef
      epsilonr = nrefr^2
      mur_mat = userdef
      mur = 1
      sigma_mat = userdef
      sigma = 0
    pec1: PerfectElectricConductor (default)
    init1: init "Initial Values 1" (default)
    ffd1: FarFieldDomain on domains 5
      ffc1: FarFieldCalculation on boundaries 7, 8, 12, 15

Mesh
  mesh1 "Mesh 1"
    size: MeshSizeDefault | hmax = 1.88; hmin = 0.0084; hcurve = 0.3; hgrad = 1.3
    map1: Map "Mapped 1" on domains 1-4
      size1: Size on domains 1-4 | hmax = lambda/6; custom = on
    ftri2: FreeTri "Free Triangular 2" on selection geom1_sel1
      size1: Size on selection geom1_sel1 | hmax = lambda / nrefr0 / 4; custom = on
    ftri1: FreeTri "Free Triangular 1" on domains 5
      size1: Size on domains 5 | hmax = lambda/4; custom = on

Studies
  std1 "Study 1"
    wave: Wavelength "Wavelength Domain" | plist = lambda

Solver configurations
  sol1 "Solution 1" (study std1)
    v1: Variables "Dependent Variables 1"
    s1: Stationary "Stationary Solver 1" | stol = 0.01
      p1: Parametric | pname = lambda0; plistarr = lambda; punit = µm; pcontinuationmode = no
      fc1: FullyCoupled | linsolver = d1
      d1: Direct "Suggested Direct Solver (ewfd)"

Datasets
  dset1: Solution | solution = sol1

Plots
  pg1: PlotGroup2D "Electric Field (ewfd)" | data = dset1
    surf1: Surface | expr = ewfd.normE
  pg2: PolarGroup "2D Far Field (ewfd)" | data = dset1
    rp1: RadiationPattern | expr = ewfd.normEfar; phidisc = 180
      exp1: Export "Export Expressions 1" | expr = comp1.ewfd.phi